# OpenSim document version 40000
MarkerSet:
  Marker LPSI: pelvis (-0.1564316 0.03656812 -0.05370134)
  Marker RPSI: pelvis (-0.156432 0.0388732 0.0528355)
  Marker LTHI: femur_l (0.0212358 -0.200472 -0.09451504)
  Marker LTHAD: femur_l (0.1403942 -0.1839701 -0.002578561)
  Marker LTHAP: femur_l (0.1131847 -0.308469 0.002843383)
  Marker LKNE: femur_l (0.0004087886 -0.4242148 -0.05778454)
  Marker LKNM: femur_l (0.002404032 -0.4252541 0.0470247)
  Marker LTIB: tibia_l (-0.01499083 -0.1746881 -0.07772507)
  Marker LTIAP: tibia_l (0.06369672 -0.1052115 -0.001073452)
  Marker LANK: tibia_l (-0.00311986 -0.3926473 -0.06227535)
  Marker LMED: tibia_l (0.002255359 -0.3853376 0.04123691)
  Marker LHEE: calcn_l (-0.0171387 0.02374681 0.01022319)
  Marker LTOE: toes_l (-0.001676856 0.01929221 0.001570203)
  Marker RTHI: femur_r (0.0589835 -0.2216413 0.07853605)
  Marker RTHAP: femur_r (0.145971 -0.1363153 -0.01542126)
  Marker RKNE: femur_r (0.0006724054 -0.4266547 0.05646441)
  Marker RKNM: femur_r (0.001318308 -0.4327401 -0.05114503)
  Marker RTIB: tibia_r (0.0009692324 -0.1637162 0.08088481)
  Marker RTIAP: tibia_r (0.07272245 -0.09395609 0.002035787)
  Marker RANK: tibia_r (-0.006991555 -0.3895468 0.05099281)
  Marker RMED: tibia_r (0.001724468 -0.3873408 -0.04253902)
  Marker RHEE: calcn_r (-0.01364109 0.02431503 -0.0137636)
  Marker RTOE: toes_r (0.002068459 0.02115311 -0.0009872674)
  Marker LASI: pelvis (0.012582 0.00156827 -0.1235928)
  Marker RASI: pelvis (0.012582 0.00156827 0.1245385)
  Marker LTIAD: tibia_l (0.04706885 -0.2052067 -0.01095356)
  Marker RTIAD: tibia_r (0.04933509 -0.2144757 0.006473175)
  Marker RTHAD: femur_r (0.1296275 -0.276673 -0.01426565)
  Marker RKJC: tibia_r (0.00464997 -0.0282484 0.004577631)
  Marker LKJC: tibia_l (0.00508615 -0.02824838 -0.003202319)
  Marker RAJC: talus_r (0.0109079 0.01837868 -0.0004489319)
  Marker LAJC: talus_l (0.006324886 0.02005332 0.00019972)
  Marker SACR: pelvis (-0.156432 0.0388732 -0.0004329)
  Marker midASIS: pelvis (0.012582 0.00156827 0.0004725)
  Marker SACR_midASIS: pelvis (0.012582 0.0388732 0.0004725)
