# OpenSim document version 40000
ScaleTool PatientSpecific_model-scaled:
  mass: -1 [kg]
  height: -1
  age: -1
  ModelScaler:
    apply: true
    scaling_order: measurements
    marker_file: ../../../../PL001/model/PL001.trc
    time_range: 0 0.13
    preserve_mass_distribution: true
    MeasurementSet:
      Measurement pelvis: apply=true
        MarkerPair: markers=(RASI LASI)
        BodyScale pelvis: axes=(X Y Z)
      Measurement thigh: apply=true
        MarkerPair: markers=(RASI RKNE)
        MarkerPair: markers=(LASI LKNE)
        BodyScale femur_r: axes=(X Y Z)
        BodyScale femur_l: axes=(X Y Z)
      Measurement shank: apply=true
        MarkerPair: markers=(RKNE RANK)
        MarkerPair: markers=(LKNE LANK)
        BodyScale tibia_r: axes=(X Y Z)
        BodyScale tibia_l: axes=(X Y Z)
        BodyScale talus_r: axes=(X Y Z)
        BodyScale talus_l: axes=(X Y Z)
      Measurement foot: apply=true
        MarkerPair: markers=(RHEE RTOE)
        MarkerPair: markers=(LHEE LTOE)
        BodyScale calcn_r: axes=(X Y Z)
        BodyScale calcn_l: axes=(X Y Z)
        BodyScale toes_r: axes=(X Y Z)
        BodyScale toes_l: axes=(X Y Z)
  MarkerPlacer:
    apply: true
    marker_file: ../../../../PL001/model/PL001.trc
    time_range: 0 0.13
    max_marker_movement: -1
    IKTaskSet:
      IKMarkerTask LPSI: apply=true weight=1000
      IKMarkerTask RPSI: apply=true weight=1000
      IKMarkerTask LASI: apply=true weight=1000
      IKMarkerTask RASI: apply=true weight=1000
      IKMarkerTask LTHAP: apply=true weight=1
      IKMarkerTask LTHI: apply=true weight=1
      IKMarkerTask LTHAD: apply=true weight=1
      IKMarkerTask LKNE: apply=true weight=1000
      IKMarkerTask LKNM: apply=true weight=1000
      IKMarkerTask LTIAP: apply=true weight=1
      IKMarkerTask LTIB: apply=true weight=1
      IKMarkerTask LTIAD: apply=true weight=1
      IKMarkerTask LHEE: apply=true weight=1000
      IKMarkerTask LANK: apply=true weight=1000
      IKMarkerTask LMED: apply=true weight=1000
      IKMarkerTask LTOE: apply=true weight=1000
      IKMarkerTask RTHAP: apply=true weight=1
      IKMarkerTask RTHI: apply=true weight=1
      IKMarkerTask RTHAD: apply=true weight=1
      IKMarkerTask RKNE: apply=true weight=1000
      IKMarkerTask RKNM: apply=true weight=1000
      IKMarkerTask RTIAP: apply=true weight=1
      IKMarkerTask RTIB: apply=true weight=1
      IKMarkerTask RTIAD: apply=true weight=1
      IKMarkerTask RHEE: apply=true weight=1000
      IKMarkerTask RANK: apply=true weight=1000
      IKMarkerTask RMED: apply=true weight=1000
      IKMarkerTask RTOE: apply=true weight=1000
