# OpenSim document version 40000
ScaleTool PatientSpecific_model-scaled:
  mass: -1 [kg]
  height: -1
  age: -1
  ModelScaler:
    apply: true
    scaling_order: measurements
    marker_file: ../../../../PL001/model/PL001.trc
    time_range: 0 0.13
    preserve_mass_distribution: true
    MeasurementSet:
      Measurement pelvis_xy: apply=true
        MarkerPair: markers=(RASI LASI)
        MarkerPair: markers=(RPSI LPSI)
        BodyScale pelvis: axes=(X Y)
      Measurement pelvis_z: apply=true
        MarkerPair: markers=(RASI LASI)
        BodyScale pelvis: axes=Z
      Measurement femur_r_y: apply=true
        MarkerPair: markers=(RHJC RKJC)
        BodyScale femur_r: axes=Y
      Measurement femur_r_xz: apply=true
        MarkerPair: markers=(RKNE RKNM)
        BodyScale femur_r: axes=(X Z)
      Measurement femur_l_y: apply=true
        MarkerPair: markers=(LHJC LKJC)
        BodyScale femur_l: axes=Y
      Measurement femur_l_xz: apply=true
        MarkerPair: markers=(LKNE LKNM)
        BodyScale femur_l: axes=(X Z)
      Measurement tibia_r_y: apply=true
        MarkerPair: markers=(RKJC RAJC)
        BodyScale tibia_r: axes=Y
      Measurement tibia_r_xz: apply=true
        MarkerPair: markers=(RMED RANK)
        BodyScale tibia_r: axes=(X Z)
      Measurement tibia_l_y: apply=true
        MarkerPair: markers=(LKJC LAJC)
        BodyScale tibia_l: axes=Y
      Measurement tibia_l_xz: apply=true
        MarkerPair: markers=(LANK LMED)
        BodyScale tibia_l: axes=(X Z)
      Measurement foot_r_xz: apply=true
        MarkerPair: markers=(RTOE RHEE)
        BodyScale talus_r: axes=(X Z)
        BodyScale calcn_r: axes=(X Z)
        BodyScale toes_r: axes=(X Z)
      Measurement foot_l_xz: apply=true
        MarkerPair: markers=(LTOE LHEE)
        BodyScale talus_l: axes=(X Z)
        BodyScale calcn_l: axes=(X Z)
        BodyScale toes_l: axes=(X Z)
      Measurement foot_r_y: apply=true
        MarkerPair: markers=(RAJC RHEE)
        BodyScale talus_r: axes=Y
        BodyScale calcn_r: axes=Y
        BodyScale toes_r: axes=Y
      Measurement foot_l_y: apply=true
        MarkerPair: markers=(LAJC LHEE)
        BodyScale talus_l: axes=Y
        BodyScale calcn_l: axes=Y
        BodyScale toes_l: axes=Y
  MarkerPlacer:
    apply: true
    marker_file: ../../../../PL001/model/PL001.trc
    time_range: 0 0.13
    max_marker_movement: -1
    IKTaskSet:
      IKMarkerTask LPSI: apply=true weight=1000
      IKMarkerTask RPSI: apply=true weight=1000
      IKMarkerTask LASI: apply=true weight=1000
      IKMarkerTask RASI: apply=true weight=1000
      IKMarkerTask LTHAP: apply=true weight=1
      IKMarkerTask LTHI: apply=true weight=1
      IKMarkerTask LTHAD: apply=true weight=1
      IKMarkerTask LKNE: apply=true weight=1000
      IKMarkerTask LKNM: apply=true weight=1000
      IKMarkerTask LTIAP: apply=true weight=1
      IKMarkerTask LTIB: apply=true weight=1
      IKMarkerTask LTIAD: apply=true weight=1
      IKMarkerTask LHEE: apply=true weight=1000
      IKMarkerTask LANK: apply=true weight=1000
      IKMarkerTask LMED: apply=true weight=1000
      IKMarkerTask LTOE: apply=true weight=1000
      IKMarkerTask RTHAP: apply=true weight=1
      IKMarkerTask RTHI: apply=true weight=1
      IKMarkerTask RTHAD: apply=true weight=1
      IKMarkerTask RKNE: apply=true weight=1000
      IKMarkerTask RKNM: apply=true weight=1000
      IKMarkerTask RTIAP: apply=true weight=1
      IKMarkerTask RTIB: apply=true weight=1
      IKMarkerTask RTIAD: apply=true weight=1
      IKMarkerTask RHEE: apply=true weight=1000
      IKMarkerTask RANK: apply=true weight=1000
      IKMarkerTask RMED: apply=true weight=1000
      IKMarkerTask RTOE: apply=true weight=1000
      IKCoordinateTask subtalar_angle_l: apply=false weight=1000 value_type=default_value value=0
      IKCoordinateTask subtalar_angle_r: apply=false weight=1000 value_type=default_value value=0
      IKCoordinateTask mtp_angle_l: apply=false weight=1000 value_type=default_value value=0
      IKCoordinateTask mtp_angle_r: apply=false weight=1000 value_type=default_value value=0
