# OpenSim document version 40000
ScaleTool PatientSpecific_model-scaled:
  mass: 78.6 [kg]
  height: 1.93
  age: -1
  ModelScaler:
    apply: true
    scaling_order: measurements
    time_range: 0 5
    preserve_mass_distribution: true
    MeasurementSet:
      Measurement pelvis x: apply=true
        MarkerPair: markers=(RASI LASI)
        MarkerPair: markers=(RPSI LPSI)
        BodyScale pelvis: axes=X
      Measurement pelvis y: apply=true
        MarkerPair: markers=(RASI LASI)
        BodyScale pelvis: axes=Y
      Measurement femur right: apply=true
        MarkerPair: markers=(RHJC RKJC)
        BodyScale femur_r: axes=(X Y Z)
      Measurement femur left: apply=true
        MarkerPair: markers=(LHJC LKJC)
        BodyScale femur_l: axes=(X Y Z)
      Measurement tibia right: apply=true
        MarkerPair: markers=(RKJC RAJC)
        BodyScale tibia_r: axes=(X Y Z)
      Measurement tibia left: apply=true
        MarkerPair: markers=(LKJC LAJC)
        BodyScale tibia_l: axes=(X Y Z)
      Measurement talus: apply=true
        MarkerPair: markers=(RKNE RANK)
        MarkerPair: markers=(LKNE LANK)
        BodyScale talus_r: axes=(X Y Z)
        BodyScale talus_l: axes=(X Y Z)
      Measurement foot: apply=true
        MarkerPair: markers=(RHEE RTOE)
        MarkerPair: markers=(LHEE LTOE)
        BodyScale calcn_r: axes=(X Y Z)
        BodyScale calcn_l: axes=(X Y Z)
        BodyScale toes_r: axes=(X Y Z)
        BodyScale toes_l: axes=(X Y Z)
  MarkerPlacer:
    apply: true
    time_range: 0 0.13
    max_marker_movement: -1
    IKTaskSet:
      IKMarkerTask LPSI: apply=true weight=1000
      IKMarkerTask RPSI: apply=true weight=1000
      IKMarkerTask LASI: apply=true weight=1000
      IKMarkerTask RASI: apply=true weight=1000
      IKMarkerTask LTHAP: apply=true weight=1
      IKMarkerTask LTHI: apply=true weight=1
      IKMarkerTask LTHAD: apply=true weight=1
      IKMarkerTask LKNE: apply=true weight=1000
      IKMarkerTask LKNM: apply=true weight=1000
      IKMarkerTask LTIAP: apply=true weight=1
      IKMarkerTask LTIB: apply=true weight=1
      IKMarkerTask LTIAD: apply=true weight=1
      IKMarkerTask LHEE: apply=true weight=1000
      IKMarkerTask LANK: apply=true weight=1000
      IKMarkerTask LMED: apply=true weight=1000
      IKMarkerTask LTOE: apply=true weight=1000
      IKMarkerTask RTHAP: apply=true weight=1
      IKMarkerTask RTHI: apply=true weight=1
      IKMarkerTask RTHAD: apply=true weight=1
      IKMarkerTask RKNE: apply=true weight=1000
      IKMarkerTask RKNM: apply=true weight=1000
      IKMarkerTask RTIAP: apply=true weight=1
      IKMarkerTask RTIB: apply=true weight=1
      IKMarkerTask RTIAD: apply=true weight=1
      IKMarkerTask RHEE: apply=true weight=1000
      IKMarkerTask RANK: apply=true weight=1000
      IKMarkerTask RMED: apply=true weight=1000
      IKMarkerTask RTOE: apply=true weight=1000
