# OpenSim document version 40000
InverseKinematicsTool:
  results_directory: ./
  constraint_weight: Inf
  accuracy: 1e-5
  time_range: -1 -1
  report_errors: true
  report_marker_locations: false
  IKTaskSet:
    IKMarkerTask RFHD: apply=true weight=1
    IKMarkerTask LFHD: apply=true weight=1
    IKMarkerTask RBHD: apply=true weight=1
    IKMarkerTask LBHD: apply=true weight=1
    IKMarkerTask CLAV: apply=true weight=1
    IKMarkerTask RTCL: apply=true weight=1
    IKMarkerTask LTCL: apply=true weight=1
    IKMarkerTask RSHO: apply=true weight=1
    IKMarkerTask LSHO: apply=true weight=1
    IKMarkerTask RELB: apply=true weight=10
    IKMarkerTask LELB: apply=true weight=10
    IKMarkerTask RFRM: apply=true weight=1
    IKMarkerTask LFRM: apply=true weight=1
    IKMarkerTask RWRA: apply=true weight=1
    IKMarkerTask LWRA: apply=true weight=1
    IKMarkerTask C7: apply=true weight=1
    IKMarkerTask SACR: apply=true apply=true weight=1
    IKMarkerTask RTHI: apply=true weight=1
    IKMarkerTask RKNE: apply=true weight=10
    IKMarkerTask RTIB: apply=true weight=1
    IKMarkerTask LTHI: apply=true weight=1
    IKMarkerTask LKNE: apply=true weight=10
    IKMarkerTask LTIB: apply=true weight=1
    IKMarkerTask LANK: apply=true weight=10
    IKMarkerTask LTOE: apply=true weight=10
    IKMarkerTask RASI: apply=true weight=1
    IKMarkerTask RTMS: apply=true weight=1
    IKMarkerTask RPSI: apply=true weight=1
    IKMarkerTask LPSI: apply=true weight=1
    IKMarkerTask RANK: apply=true weight=10
    IKMarkerTask RTOE: apply=true weight=10
    IKMarkerTask RHEE: apply=true weight=10
    IKMarkerTask LHEE: apply=true weight=10
    IKMarkerTask LASI: apply=true weight=1
    IKMarkerTask LTMS: apply=true weight=1
    IKMarkerTask RWRB: apply=true weight=1
    IKMarkerTask LWRB: apply=true weight=1
    IKMarkerTask STRN: apply=true weight=1
    IKMarkerTask LTBL: apply=true weight=1
    IKMarkerTask RTBL: apply=true weight=1
    IKMarkerTask LTBH: apply=true weight=1
    IKMarkerTask SPL3: apply=true weight=1
    IKMarkerTask SPL5: apply=true weight=1
    IKMarkerTask SPL4: apply=true weight=1
    IKMarkerTask SPL2: apply=true weight=1
    IKMarkerTask SPL1: apply=true weight=1
    IKMarkerTask T10: apply=true weight=1
    IKMarkerTask SPT4: apply=true weight=1
    IKMarkerTask SPT3: apply=true weight=1
    IKMarkerTask SPT2: apply=true weight=1
    IKMarkerTask SPT1: apply=true weight=1
    IKMarkerTask RTBH: apply=true weight=1
    IKMarkerTask LTSC: apply=true weight=1
    IKMarkerTask RBAK: apply=true weight=1
    IKMarkerTask RFIN: apply=true weight=10
    IKMarkerTask LFIN: apply=true weight=10
