# OpenSim document version 40000
InverseKinematicsTool:
  results_directory: ./
  constraint_weight: Inf
  accuracy: 1e-5
  time_range: -1 -1
  report_errors: true
  report_marker_locations: false
  IKTaskSet:
    IKMarkerTask RPSI: apply=true weight=1
    IKMarkerTask LPSI: apply=true weight=1
    IKMarkerTask RASI: apply=true weight=1
    IKMarkerTask LASI: apply=true weight=1
    IKMarkerTask LTHAP: apply=true weight=10
    IKMarkerTask LTHI: apply=true weight=10
    IKMarkerTask LTHAD: apply=true weight=10
    IKMarkerTask LKNE: apply=true weight=1
    IKMarkerTask LKNM: apply=true weight=1
    IKMarkerTask LTIAP: apply=true weight=10
    IKMarkerTask LTIB: apply=true weight=10
    IKMarkerTask LTIAD: apply=true weight=10
    IKMarkerTask LHEE: apply=true weight=1
    IKMarkerTask LANK: apply=true weight=1
    IKMarkerTask LMED: apply=true weight=1
    IKMarkerTask LTOE: apply=true weight=1
    IKMarkerTask RTHAP: apply=true weight=10
    IKMarkerTask RTHI: apply=true weight=10
    IKMarkerTask RTHAD: apply=true weight=10
    IKMarkerTask RKNE: apply=true weight=1
    IKMarkerTask RKNM: apply=true weight=1
    IKMarkerTask RTIAP: apply=true weight=10
    IKMarkerTask RTIB: apply=true weight=10
    IKMarkerTask RTIAD: apply=true weight=10
    IKMarkerTask RHEE: apply=true weight=1
    IKMarkerTask RANK: apply=true weight=1
    IKMarkerTask RMED: apply=true weight=1
    IKMarkerTask RTOE: apply=true weight=1
    IKCoordinateTask subtalar_angle_r: apply=true weight=1000 value_type=default_value value=0
    IKCoordinateTask subtalar_angle_l: apply=true weight=1000 value_type=default_value value=0
    IKCoordinateTask mtp_angle_r: apply=true weight=1000 value_type=default_value value=0
    IKCoordinateTask mtp_angle_l: apply=true weight=1000 value_type=default_value value=0
