# OpenSim document version 40000
ForceSet Reserve_Actuators:
  # Actuators on the base segement are called Residual actuators
  # whose forces account for the errors in the model, its kinematic
  # that do not balance with experimental ground reaction forces
  PointActuator [values shared by the 6 below unless stated]: isDisabled=true point=(0 0 0) point_is_global=false
      force_is_global=true optimal_force=5
  PointActuator Feet_FXR: body=calcn_r direction=(-1 0 0)
  PointActuator Feet_FYR: body=calcn_r direction=(0 1 0)
  PointActuator Feet_FZR: body=calcn_r direction=(0 0 -1)
  PointActuator Feet_FXL: body=calcn_l direction=(-1 0 0)
  PointActuator Feet_FYL: body=calcn_l direction=(0 1 0)
  PointActuator Feet_FZL: body=calcn_l direction=(0 0 1)
  TorqueActuator MZR: isDisabled=true min_control=-10000 max_control=1000 bodyA=ground bodyB=calcn_r
      torque_is_global=true axis=(0 0 -1) optimal_force=5
  TorqueActuator MZL: isDisabled=true min_control=-10000 max_control=1000 bodyA=ground bodyB=calcn_l
      torque_is_global=true axis=(0 0 -1) optimal_force=5
