# OpenSim document version 40000
ForceSet Reserve_Actuators:
  # Actuators on the base segement are called Residual actuators
  # whose forces account for the errors in the model, its kinematic
  # that do not balance with experimental ground reaction forces
  PointActuator FX: body=pelvis point=(-0.0724376 0 0) point_is_global=false direction=(1 0 0) force_is_global=true
      optimal_force=1
  PointActuator FY: body=pelvis point=(-0.0724376 0 0) point_is_global=false direction=(0 1 0) force_is_global=true
      optimal_force=1
  PointActuator FZ: body=pelvis point=(-0.0724376 0 0) point_is_global=false direction=(0 0 1) force_is_global=true
      optimal_force=1
  TorqueActuator MX: bodyA=pelvis bodyB=ground torque_is_global=true axis=(1 0 0) optimal_force=1
  TorqueActuator MY: bodyA=pelvis bodyB=ground torque_is_global=true axis=(0 1 0) optimal_force=1
  TorqueActuator MZ: bodyA=pelvis bodyB=ground torque_is_global=true axis=(0 0 1) optimal_force=1
