# OpenSim document version 40000
ForceSet Reserve_Actuators:
  # Actuators on the base segement are called Residual actuators
  # whose forces account for the errors in the model, its kinematic
  # that do not balance with experimental ground reaction forces
  PointActuator FX: body=pelvis point=(-0.07580611 0 0) point_is_global=false direction=(1 0 0) force_is_global=true
      optimal_force=100
  PointActuator FY: body=pelvis point=(-0.07580611 0 0) point_is_global=false direction=(0 1 0) force_is_global=true
      optimal_force=200
  PointActuator FZ: body=pelvis point=(-0.07580611 0 0) point_is_global=false direction=(0 0 1) force_is_global=true
      optimal_force=100
  TorqueActuator MX: bodyA=pelvis bodyB=ground torque_is_global=true axis=(1 0 0) optimal_force=80
  TorqueActuator MY: bodyA=pelvis bodyB=ground torque_is_global=true axis=(0 1 0) optimal_force=80
  TorqueActuator MZ: bodyA=pelvis bodyB=ground torque_is_global=true axis=(0 0 1) optimal_force=80
  # Actuators on the Coordinates are called Reserve actuators
  # and are used the drive the model when the model excludes its muscles (i.e. RRA)
  # or when muscles are insufficient to track desired kinematics (CMC)
  CoordinateActuator hip_flexion_r_reserve: coordinate=hip_flexion_r optimal_force=100
  CoordinateActuator hip_adduction_r_reserve: coordinate=hip_adduction_r optimal_force=100
  CoordinateActuator hip_rotation_r_reserve: coordinate=hip_rotation_r optimal_force=100
  CoordinateActuator knee_angle_r_reserve: coordinate=knee_angle_r optimal_force=100
  CoordinateActuator ankle_angle_r_reserve: coordinate=ankle_angle_r optimal_force=100
  CoordinateActuator subtalar_angle_r_reserve: coordinate=subtalar_angle_r optimal_force=100
  CoordinateActuator mtp_angle_r_reserve: coordinate=mtp_angle_r optimal_force=100
  CoordinateActuator hip_flexion_l_reserve: coordinate=hip_flexion_l optimal_force=100
  CoordinateActuator hip_adduction_l_reserve: coordinate=hip_adduction_l optimal_force=100
  CoordinateActuator hip_rotation_l_reserve: coordinate=hip_rotation_l optimal_force=100
  CoordinateActuator knee_angle_l_reserve: coordinate=knee_angle_l optimal_force=100
  CoordinateActuator ankle_angle_l_reserve: coordinate=ankle_angle_l optimal_force=100
  CoordinateActuator subtalar_angle_l_reserve: coordinate=subtalar_angle_l optimal_force=100
  CoordinateActuator mtp_angle_l_reserve: coordinate=mtp_angle_l optimal_force=100
  CoordinateActuator lumbar_extension_reserve: coordinate=lumbar_extension optimal_force=100
  CoordinateActuator lumbar_bending_reserve: coordinate=lumbar_bending optimal_force=100
  CoordinateActuator lumbar_rotation_reserve: coordinate=lumbar_rotation optimal_force=100
